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/COM,ANSYS RELEASE 2025 R1           BUILD 25.1      UP20241202       18:36:32
/PREP7
/TITLE,Cantilever_For_Fortran--Static Structural (A5)
ANTYPE, 0
EQSLV,SPAR,  0.00000000    ,,0
TOFFST,  273.150000
DMPOPT,ESAV,NO
DMPOPT,EMAT,NO
*IF,_CDRDOFF,EQ,1,THEN     !if solid model was read in
_CDRDOFF=             !reset flag, numoffs already performed
*ELSE              !offset database for the following FE model
NUMOFF,NODE,      569
NUMOFF,ELEM,      160
NUMOFF,MAT ,        1
NUMOFF,REAL,        1
NUMOFF,TYPE,        1
*ENDIF
*SET,ANSINTER_,  2.000000000000
*SET,TEMPERATURE,'TEMP                            '
*SET,_ASMDIAG,  100.4987562112
*SET,_BUTTON ,  0.000000000000
*SET,_GUI_CLR_BG,' systemButtonFace               '
*SET,_GUI_CLR_FG,' systemButtonText               '
*SET,_GUI_CLR_INFOBG,' systemInfoBackground           '
*SET,_GUI_CLR_SEL,' systemHighlight                '
*SET,_GUI_CLR_SELBG,' systemHighlight                '
*SET,_GUI_CLR_SELFG,' systemHighlightText            '
*SET,_GUI_CLR_WIN,' systemWindow                   '
*SET,_GUI_FNT_FMLY,'Arial                           '
*SET,_GUI_FNT_PXLS,  20.00000000000
*SET,_GUI_FNT_SLNT,'r                               '
*SET,_GUI_FNT_WEGT,'medium                          '
*SET,_MAXELEMNUM,  160.0000000000
*SET,_MAXELEMTYPE,  1.000000000000
*SET,_MAXNODENUM,  569.0000000000
*SET,_MAXREALCONST,  1.000000000000
*SET,_NUMELEM,  160.0000000000
*SET,_NUMNODE,  569.0000000000
*SET,_RETURN ,  0.000000000000
*SET,_STATUS ,  0.000000000000
*SET,_THICKRATIO,  0.000000000000
*SET,_UIQR   ,'                                '
*SET,_WALLBSOL,  18.59722222222
*SET,_WALLSTRT,  18.59722222222
                                                                                                                                                        '
*SET,_XMAX   ,  100.0000000000
*SET,_XMIN   ,  0.000000000000
*SET,_YMAX   ,  10.00000000000
*SET,_YMIN   ,  0.000000000000
*SET,_ZMAX   ,  0.000000000000
*SET,_ZMIN   ,  0.000000000000
DOF,DELETE
ETBLOCK,        1,        1
(2i9,19a9)
        1      183        0        0        3        0        0        0        0        0        0        0        0        0        0        0        0        0        0        0        0
       -1
NBLOCK,6,SOLID,       569,       569
(3i9,6e21.13e3)
        1        0        0 0.0000000000000E+000 1.0000000000000E+001
        2        0        0 0.0000000000000E+000
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N,UNBL,LOC,       -1,
EBLOCK,19,SOLID,       160,       160
(19i10)
         1         1         1         1         0         0         0         0         8         0         1        90       187       186        89       384       551       381       378
         1         1         1         1         0         0         0         0         8         0         2        89       146       145        90       380       510       383       378
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        -1
CMBLOCK,_CM31F  ,NODE,       1  ! users node component definition
(8i10)
        27
CMBLOCK,_FIXEDSU,NODE,       2  ! users node component definition
(8i10)
         2         4
RLBLOCK,       1,       1,       6,       7
(2i8,6g16.9)
(7g16.9)
       1       6  5.00000000      0.00000000      0.00000000      0.00000000      0.00000000      0.00000000
MPTEMP,UNBL, 1, 1,  0.00000000    ,
MPDATA,UNBL, 1,EX  ,       1, 1,  200000.000    ,
MPTEMP,UNBL, 1, 1,  0.00000000    ,
MPDATA,UNBL, 1,NUXY,       1, 1, 0.300000000    ,
MPTEMP,UNBL, 1, 1,  0.00000000    ,
MPDATA,UNBL, 1,ALPX,       1, 1, 1.200000000E-05,
MPTEMP,UNBL, 1, 1,  0.00000000    ,
MPDATA,UNBL, 1,DENS,       1, 1, 7.850000000E-09,
MPTEMP,UNBL, 1, 1,  0.00000000    ,
MPDATA,UNBL, 1,KXX ,       1, 1,  60.5000000    ,
MPTEMP,UNBL, 1, 1,  0.00000000    ,
MPDATA,UNBL, 1,RSVX,       1, 1, 1.700000000E-04,
MPTEMP,UNBL, 1, 1,  0.00000000    ,
MPDATA,UNBL, 1,C   ,       1, 1,  434000000.    ,
MPTEMP,UNBL, 1, 1,  0.00000000    ,
MPDATA,UNBL, 1,MURX,       1, 1,  10000.0000    ,
MPTEMP,UNBL,16, 1,  1.00000000    ,  2.00000000    ,  3.00000000
MPTEMP,UNBL,16, 4,  4.00000000    ,  5.00000000    ,  6.00000000
MPTEMP,UNBL,16, 7,  7.00000000    ,  8.00000000    ,  9.00000000
MPTEMP,UNBL,16,10,  10.0000000    ,  11.0000000    ,  12.0000000
MPTEMP,UNBL,16,13,  13.0000000    ,  14.0000000    ,  15.0000000
MPTEMP,UNBL,16,16,  16.0000000    ,
MPDATA,UNBL,16,UMID,       1, 1, 892940336.0    , 845231929.0    , 758591843.0
MPDATA,UNBL,16,UMID,       1, 4, 841823282.0    , 946154809.0    , 808870445.0
MPDATA,UNBL,16,UMID,       1, 7, 892691511.0    , 1684170085.    , 825241701.0
MPDATA,UNBL,16,UMID,       1,10, 538976288.0    , 538976288.0    , 538976288.0
MPDATA,UNBL,16,UMID,       1,13, 538976288.0    , 538976288.0    , 538976288.0
MPDATA,UNBL,16,UMID,       1,16, 538976288.0    ,
MPTEMP,UNBL,16, 1,  1.00000000    ,  2.00000000    ,  3.00000000
MPTEMP,UNBL,16, 4,  4.00000000    ,  5.00000000    ,  6.00000000
MPTEMP,UNBL,16, 7,  7.00000000    ,  8.00000000    ,  9.00000000
MPTEMP,UNBL,16,10,  10.0000000    ,  11.0000000    ,  12.0000000
MPTEMP,UNBL,16,13,  13.0000000    ,  14.0000000    ,  15.0000000
MPTEMP,UNBL,16,16,  16.0000000    ,
MPDATA,UNBL,16,UVID,       1, 1, 959537459.0    , 1698129206.    , 761541940.0
MPDATA,UNBL,16,UVID,       1, 4, 892154929.0    , 892874082.0    , 1681469997.
MPDATA,UNBL,16,UVID,       1, 7, 862073654.0    , 1631085876.    , 862348084.0
MPDATA,UNBL,16,UVID,       1,10, 538976288.0    , 538976288.0    , 538976288.0
MPDATA,UNBL,16,UVID,       1,13, 538976288.0    , 538976288.0    , 538976288.0
MPDATA,UNBL,16,UVID,       1,16, 538976288.0    ,
EXTOPT,ATTR,      0,      0,      0
EXTOPT,ESIZE,  0,  0.0000
EXTOPT,ACLEAR,      0
TREF,  22.0000000
IRLF,  0
BFUNIF,TEMP,_TINY
ACEL,  0.00000000    ,  0.00000000    ,  0.00000000
OMEGA,  0.00000000    ,  0.00000000    ,  0.00000000
DOMEGA,  0.00000000    ,  0.00000000    ,  0.00000000
CGLOC,  0.00000000    ,  0.00000000    ,  0.00000000
CGOMEGA,  0.00000000    ,  0.00000000    ,  0.00000000
DCGOMG,  0.00000000    ,  0.00000000    ,  0.00000000
NLDIAG,EFLG,OFF
NLDIAG,NRRE,OFF
NLDIAG,CONT,ITER

NSUBST,         1,         1,         1,
KUSE,     0
TIME,  1.00000000
ALPHAD,  0.00000000
BETAD,  0.00000000
DMPRAT,  0.00000000
DMPSTR,  0.00000000

CRPLIM, 0.100000000    ,   0
CRPLIM,  0.00000000    ,   1
NCNV,     1,  0.00000000    ,     0,  0.00000000    ,  0.00000000
NEQIT,     0

ERESX,DEFA
OUTRES, ALL,NONE,
OUTRES,NSOL, ALL,
OUTRES,RSOL, ALL,
OUTRES,EANG, ALL,
OUTRES,ETMP, ALL,
OUTRES,VENG, ALL,
OUTRES,STRS, ALL,
OUTRES,EPEL, ALL,
OUTRES,EPPL, ALL,
OUTRES,CONT, ALL,

DBLOCK,         4
(i9,a6,2(pg16.9))
        2  UX    0.00000000      0.00000000
        2  UY    0.00000000      0.00000000
        4  UX    0.00000000      0.00000000
        4  UY    0.00000000      0.00000000
       -1
FBLOCK,         2
(i9,a6,2(pg16.9))
       27  FX    0.00000000      0.00000000
       27  FY   -1500.00000      0.00000000
       -1


C* Prescribed displacement: Label can be UX, UY, AL, ALL
 C* DND, FirstNodeNo, Label, Value, LastNodeNo, NodeNoInc, Additional labels
    DND,           2,   ALL,   0.0,          1,         1, RX, RZ,
    DND,           4,   ALL,   0.0,          2,         1, RX, RZ,


C* Prescribed nodal force
C*      FND, Nodeno, Label, Force
        FND, 27, FY, -1500.0000


FINISH
